Simulations: Version=210
  Memo Notes
    # Pinus Example Notes

    This example for Pinus is a hypothetical plantation with a soil from near Canberra and a climate from Lincoln, NZ. Daily rainfall has been increased by a factor of 2 using the ClimateController.

    Treatments are factorial combinations of irrigation and N fertilization, for which mortality is applied separately, and all treatments are thinned heavily at 16 years of age.

    An additional control treatment is provided to demonstrate how thinning or mortality 'from below' (biased towards smaller trees) can be simulated, rather than applying mortality to average trees that essentially assumes that it is evenly applied to all tree size classes.

    Harvest is at 22 years, with a replanting the following June.

    A range of reports and graphs are provided.
  Folder Replacements
    Report: EventNames=[Clock].DoReport
      VariableNames:
        [Clock].Today
        [Pinus].Age
        [Pinus].Population*10000 as stemsperha
        [Pinus].AboveGround.Wt
        [Pinus].AboveGround.N
        [Pinus].BelowGround.Wt
        [Pinus].Leaf.Dead.Wt
        [Pinus].Leaf.Live.Wt
        [Pinus].Leaf.Live.NConc
        [Pinus].Leaf.Wt
        [Pinus].Branch.Live.Wt
        [Pinus].Branch.Dead.Wt
        [Pinus].Branch.Wt
        [Pinus].Leaf.Detached.Wt
        [Pinus].Stem.Live.Wt
        [Pinus].Total.N
        [Pinus].Leaf.Live.NConc
        [Pinus].Cone.Live.NConc
        [Pinus].Branch.Live.NConc
        [Pinus].Stem.Live.NConc
        [Pinus].CoarseRoot.Live.NConc
        [Pinus].CoarseRoot.Live.Wt
        [Pinus].FineRoot.Live.NConc
        [Pinus].Leaf.Live.N*10 as LiveFoliarN
        [Pinus].Leaf.N*10 as TotalFoliarN
        [Pinus].Leaf.CoverGreen
        [Pinus].Leaf.SpecificLeafArea
        [Pinus].Leaf.LAI
        [Pinus].LAI
        [Pinus].Leaf.Fn
        [Pinus].Leaf.Fw
        [Pinus].TotalLive.Wt
        ([Pinus].Leaf.Transpiration + [Soil].SoilWater.Es + [MicroClimate].PrecipitationInterception) as ET
        [Pinus].IndividualTreeStemWt
        [Pinus].IndividualTreeLiveWt
        [Pinus].Stem.DBH
        [Pinus].Stem.Ht
        [Pinus].RootShootRatio
        [Pinus].Stem.Vol
        [Pinus].Stem.MAI
        [Pinus].Stem.BA
        [Pinus].Stem.BarkThickness
        [Pinus].Stem.BarkWt
        [Pinus].Stem.BAub
        [Pinus].Stem.DBHub
        [Pinus].Stem.MAIub
        [Pinus].Stem.VolBark
        [Pinus].Stem.Volub
        [Pinus].Stem.WoodDensity
        [Pinus].Stem.BarkDensity
        [Pinus].Stem.WoodWt
        [Pinus].Stem.Wt
        [Pinus].Stem.Live.Wt
        [Pinus].FineRoot.Wt
        [Pinus].CoarseRoot.Wt
        [Pinus].Cone.Wt
        [Pinus].TotalWoodBark.Wt
        sum ([SoilWater].PAWmm) as PAWmmTotal
        [Soil].Water.MM[1] as SWmmD1
        [SoilWater].Evaporation
        [SoilWater].Drainage
        [SoilWater].Flux[1]
        [SoilWater].Flow[1]
        [SoilWater].Infiltration
        [SoilWater].LateralFlow[1]
        [SoilWater].LateralOutflow
        [SoilWater].Runoff
        [MicroClimate].PrecipitationInterception
        [Pinus].FineRoot.WaterUptake
        [Soil].Water.Volumetric[1] as SWD1
        [Soil].Water.Volumetric[2] as SWD2
        [Soil].Water.Volumetric[3] as SWD3
        [Soil].Water.Volumetric[4] as SWD4
        sum([Soil].Water.MM) as SWmmTotal
        [Soil].NH4.ppm[1]
        [Soil].NO3.ppm[1]
        ([Soil].NO3.ppm + [Soil].NH4.ppm) as MineralNppm
        (sum ([Soil].NH4.kgha)+ sum ([Soil].NO3.kgha)) as MineralNTotalkgpha
        [Irrigation].IrrigationApplied
        [Weather].Rain
        [Pinus].Leaf.HeightFunction
    Report HarvestReport: EventNames=[Pinus].Harvesting
      VariableNames:
        [Clock].Today
        [Pinus].Stem.DBH
        [Pinus].Stem.Ht
        [Pinus].RootShootRatio
        [Pinus].Stem.Vol
        [Pinus].Stem.MAI
        [Pinus].Stem.BA
        [Pinus].Stem.BarkThickness
        [Pinus].Stem.BarkWt
        [Pinus].Stem.BAub
        [Pinus].Stem.DBHub
        [Pinus].Stem.MAIub
        [Pinus].Stem.VolBark
        [Pinus].Stem.Volub
        [Pinus].Stem.WoodDensity
    Report AnnualReport: EventNames=[Clock].EndOfYear
      VariableNames:
        [Clock].Today
        sum of ([Nutrient].MineralisedN[1]+[Nutrient].MineralisedN[2]+[Nutrient].MineralisedN[3]+[Nutrient].MineralisedN[4]) from [Clock].StartOfYear to [Clock].EndOfYear as NNMkgphaTop4DepthsAnnual
  DataStore
  Folder Plantation_IxF_Experiment
    Experiment Treatment
      Factors
        Factor _: Specification=[Management]
          Operations C
            1973-12-31  [TreeThinning].Script.DoThin(0.05);
            1974-12-31  [TreeThinning].Script.DoThin(0.05);
            1975-12-31  [TreeThinning].Script.DoThin(0.05);
            1976-12-31  [TreeThinning].Script.DoThin(0.05);
            1977-12-31  [TreeThinning].Script.DoThin(0.05);
            1978-12-31  [TreeThinning].Script.DoThin(0.05);
            1979-12-31  [TreeThinning].Script.DoThin(0.05);
            1980-12-31  [TreeThinning].Script.DoThin(0.05);
            1981-12-31  [TreeThinning].Script.DoThin(0.05);
            1982-12-31  [TreeThinning].Script.DoThin(0.01);
            1983-06-15  [TreeThinning].Script.DoThin(0.00);
            1989-04-03  [TreeThinning].Script.DoThin(0.563);
            1973-06-15  [Fertiliser].Apply(amount: 20, type: "NH4N", 0)
          Operations F
            1973-12-31  [TreeThinning].Script.DoThin(0.05);
            1974-12-31  [TreeThinning].Script.DoThin(0.05);
            1975-12-31  [TreeThinning].Script.DoThin(0.05);
            1976-12-31  [TreeThinning].Script.DoThin(0.05);
            1977-12-31  [TreeThinning].Script.DoThin(0.05);
            1978-12-31  [TreeThinning].Script.DoThin(0.05);
            1979-12-31  [TreeThinning].Script.DoThin(0.05);
            1980-12-31  [TreeThinning].Script.DoThin(0.05);
            1981-12-31  [TreeThinning].Script.DoThin(0.05);
            1982-12-31  [TreeThinning].Script.DoThin(0.05);
            1983-06-15  [TreeThinning].Script.DoThin(0.00);
            1985-06-15  [TreeThinning].Script.DoThin(0.068);
            1986-06-15  [TreeThinning].Script.DoThin(0.029);
            1987-08-27  [TreeThinning].Script.DoThin(0.015);
            1988-04-03  [TreeThinning].Script.DoThin(0.032);
            1989-04-03  [TreeThinning].Script.DoThin(0.46);
            1973-06-15  [Fertiliser].Apply(amount: 20, type: "NH4N", 0)
            1983-09-28  [Fertiliser].Apply(amount: 200, type: "NH4N", 0)
            1983-11-18  [Fertiliser].Apply(amount: 200, type: "NH4N", 0)
          Operations I
            1973-12-31  [TreeThinning].Script.DoThin(0.05);
            1974-12-31  [TreeThinning].Script.DoThin(0.05);
            1975-12-31  [TreeThinning].Script.DoThin(0.05);
            1976-12-31  [TreeThinning].Script.DoThin(0.05);
            1977-12-31  [TreeThinning].Script.DoThin(0.05);
            1978-12-31  [TreeThinning].Script.DoThin(0.05);
            1979-12-31  [TreeThinning].Script.DoThin(0.05);
            1980-12-31  [TreeThinning].Script.DoThin(0.00);
            1981-12-31  [TreeThinning].Script.DoThin(0.00);
            1982-12-31  [TreeThinning].Script.DoThin(0.00);
            1983-06-15  [TreeThinning].Script.DoThin(0.00);
            1987-08-27  [TreeThinning].Script.DoThin(0.014);
            1988-04-03  [TreeThinning].Script.DoThin(0.014);
            1989-04-03  [TreeThinning].Script.DoThin(0.555);
            1973-06-15  [Fertiliser].Apply(amount: 20, type: "NH4N", 0)
            1983-08-25  [AutomaticIrrigation].Script.TurnOn()
            2003-12-31  [AutomaticIrrigation].Script.TurnOff()
          Operations IF
            1973-12-31  [TreeThinning].Script.DoThin(0.05);
            1974-12-31  [TreeThinning].Script.DoThin(0.05);
            1975-12-31  [TreeThinning].Script.DoThin(0.05);
            1976-12-31  [TreeThinning].Script.DoThin(0.05);
            1977-12-31  [TreeThinning].Script.DoThin(0.05);
            1978-12-31  [TreeThinning].Script.DoThin(0.05);
            1979-12-31  [TreeThinning].Script.DoThin(0.01);
            1980-12-31  [TreeThinning].Script.DoThin(0.00);
            1981-12-31  [TreeThinning].Script.DoThin(0.00);
            1982-12-31  [TreeThinning].Script.DoThin(0.00);
            1989-04-03  [TreeThinning].Script.DoThin(0.462);
            1973-06-15  [Fertiliser].Apply(amount: 20, type: "NH4N", 0)
            1983-06-28  [Fertiliser].Apply(amount: 200, type: "NH4N", 0)
            1983-11-18  [Fertiliser].Apply(amount: 200, type: "NH4N", 0)
            1983-08-25  [AutomaticIrrigation].Script.TurnOn()
            2003-12-31  [AutomaticIrrigation].Script.TurnOff()
          Operations CThinFromBelow
            1973-12-31  [TreeThinningFromAboveOrBelow].Script.DoThin(0.05);
            1974-12-31  [TreeThinningFromAboveOrBelow].Script.DoThin(0.05);
            1975-12-31  [TreeThinningFromAboveOrBelow].Script.DoThin(0.05);
            1976-12-31  [TreeThinningFromAboveOrBelow].Script.DoThin(0.05);
            1977-12-31  [TreeThinningFromAboveOrBelow].Script.DoThin(0.05);
            1978-12-31  [TreeThinningFromAboveOrBelow].Script.DoThin(0.05);
            1979-12-31  [TreeThinningFromAboveOrBelow].Script.DoThin(0.05);
            1980-12-31  [TreeThinningFromAboveOrBelow].Script.DoThin(0.05);
            1981-12-31  [TreeThinningFromAboveOrBelow].Script.DoThin(0.05);
            1982-12-31  [TreeThinningFromAboveOrBelow].Script.DoThin(0.01);
            1983-06-15  [TreeThinningFromAboveOrBelow].Script.DoThin(0.00);
            1989-04-03  [TreeThinningFromAboveOrBelow].Script.DoThin(0.563);
            1973-06-15  [Fertiliser].Apply(amount: 20, type: "NH4N", 0)
      Simulation Base
        Clock: Start=1973-05-01; End=1995-12-31
        Weather: FileName=%root%/Examples/WeatherFiles/NZ_Lincoln
        Manager ClimateController
          AllowControl = True
          EnableDate = 01/01/1972 00:00:00
          WithinYearControl = False
          ControlStart =
          ControlEnd =
          RainfallMultiplier = 2
          RainfallAddition = 0
          RadiationMultiplier = 1
          RadiationAddition = 0
          MinTMultiplier = 1
          MinTAddition = 0
          MaxTMultiplier = 1
          MaxTAddition = 0
          WindMultiplier = 1
          WindAddition = 0
          VPMultiplier = 1
          VPAddition = 0
```csharp
using Newtonsoft.Json;
using APSIM.Shared.Utilities;
using Models.Interfaces;
using Models.Soils;
using Models.PMF;
using Models.Core;
using System.Xml.Serialization;
using System;
using System.Linq;
using Models.Soils.Nutrients;
using Models.Climate;

namespace Models
{
    [Serializable]
    public class Script : Model
    {
        // - Links to APSIM models
        [Link] Zone zone;
        [Link] Clock clock;
        [Link] Weather weather;
        [Link] ISummary summary = null;

        // - Paramters for this manager
        [Description("Enable? Set to 'No' to completely disable this manager")] public bool AllowControl { get; set; }

        [Separator("General settings")]
        [Description("Start the climate controls beginning on date (dd/mmm/yyyy): ")] public DateTime EnableDate { get; set; }
        [Description("Implement climate control only during part of the year?")] public bool WithinYearControl { get; set; }
        [Description("Within each year, the first day to start the climate controls is (dd-mmm)")] public string ControlStart { get; set; }
        [Description("Within each year, end last day of climate control is (dd-mmm)")] public string ControlEnd { get; set; }

        [Separator("Rainfall")]
        [Description("Rainfall multiplier (-): ")] public double RainfallMultiplier { get; set; }
        [Description("Rainfall addition (mm): ")] public double RainfallAddition { get; set; }

        [Separator("Radiation")]
        [Description("Radiation multiplier (-): ")] public double RadiationMultiplier { get; set; }
        [Description("Radiation addition (MJ/m2): ")] public double RadiationAddition { get; set; }

        [Separator("Minimum temperature")]
        [Description("Minimum temperature multiplier (-): ")] public double MinTMultiplier { get; set; }
        [Description("Minimum temperature addition (C): ")] public double MinTAddition { get; set; }

        [Separator("Maximum temperature")]
        [Description("Maximum temperature multiplier (-): ")] public double MaxTMultiplier { get; set; }
        [Description("Maximum temperature addition (C): ")] public double MaxTAddition { get; set; }

        [Separator("Wind speed")]
        [Description("Wind speed multiplier (-): ")] public double WindMultiplier { get; set; }
        [Description("Wind speed addition (m/s): ")] public double WindAddition { get; set; }

        [Separator("Vapour pressure")]
        [Description("Vapour pressure multiplier (-): ")] public double VPMultiplier { get; set; }
        [Description("Vapour pressure addition (hPa): ")] public double VPAddition { get; set; }

        [JsonIgnore] public bool DoControl { get; set; }
        [JsonIgnore] public int DoControlInt { get; set; }

        [EventSubscribe("PreparingNewWeatherData")] private void OnDoManagement(object sender, EventArgs e)
        {
            // Check if this manager is enabled
            if ((AllowControl) && (clock.Today >= EnableDate))
            {
                DoControl = true;
                if (WithinYearControl)
                    DoControl = DateUtilities.WithinDates(ControlStart, clock.Today, ControlEnd); 
            }

            if (DoControl)
                DoControlInt = 1;
            else
                DoControlInt = 0;

            if (DoControl)
            {
                // do the weather alterations 
                weather.Rain = RainfallMultiplier * weather.Rain + RainfallAddition;
                weather.Radn = RadiationMultiplier * weather.Radn + RadiationAddition;
                weather.MinT = MinTMultiplier * weather.MinT + MinTAddition;
                weather.MaxT = MaxTMultiplier * weather.MaxT + MaxTAddition;
                weather.Wind = WindMultiplier * weather.Wind + WindAddition;
                weather.VP = VPMultiplier * weather.VP + VPAddition;
            }
        }
    }
}
```
        MicroClimate: a_interception=0; b_interception=0; c_interception=0.59; d_interception=0; SoilHeatFluxFraction=0.1; MinimumHeightDiffForNewLayer=0; NightInterceptionFraction=0; ReferenceHeight=2
        SoilArbitrator Soil Arbitrator
        Summary
        Zone Plantation: Area=1; Slope=5; AspectAngle=0; Altitude=50
          Soil SoilBFG: ASCOrder=NA; ASCSubOrder=NA; SoilType=Sand; Site=30395_43104; NearestTown=HALL; Region=South Eastern Highlands; State=ACT; NaturalVegetation=Cleared, non-native vegetation, buildings; ApsoilNumber=9999; Latitude=-35.33; Longitude=148.92; LocationAccuracy=+- 90m; YearOfSampling=2020; Comments=Landuse is Plantation forestry
            DataSource=Soil and Landscape Grid of Australia. This soil parameter file was automatically generated from the GSM National Surfaces using pedotransfer functions.
            Physical
              Thickness  BD     AirDry  LL15  DUL   SAT
              100        1.457  0.02    0.06  0.23  0.4
              200        1.6    0.02    0.06  0.23  0.35
              200        1.68   0.02    0.1   0.24  0.33
              300        1.75   0.05    0.18  0.25  0.31
              300        1.7    0.06    0.18  0.24  0.28
              300        1.7    0.06    0.18  0.23  0.23
              300        1.7    0.06    0.18  0.22  0.23
              300        1.7    0.06    0.18  0.22  0.23
              SoilCrop PinusSoil: LL=[0.06, 0.06, 0.06, 0.07, 0.08, 0.08, 0.08, 0.08]; KL=[0.07, 0.07, 0.05, 0.02, 0.01, 0.005, 0.005, 0.005]; XF=[1, 1, 1, 0.5, 0.3, 0.3, 0.3, 0.3]
            Water: Thickness=[100, 100, 250, 150, 200, 200, 500, 500]; InitialValues=[0.06, 0.06, 0.1, 0.18, 0.18, 0.18, 0.18, 0.18]; FilledFromTop=false
            WaterBalance SoilWater: SummerDate=1-nov; SummerU=4; SummerCona=2; WinterDate=1-apr; WinterU=4; WinterCona=2; DiffusConst=140; DiffusSlope=50; Salb=0.13; CN2Bare=20; CNRed=10; CNCov=0.8; PSIDul=-100; Thickness=[100, 200, 200, 300, 300, 300, 300, 300]; SWCON=[0.9, 0.9, 0.9, 0.2, 0.05, 0.02, 0.01, 0.001]
            Organic: FOMCNRatio=40; CarbonUnits=Total
              Thickness  Carbon  SoilCNRatio  FBiom  FInert  FOM
              100        3.1     15           0.03   0.1     475.475
              100        2       16           0.02   0.2     303.176
              250        1       18           0.01   0.3     193.314
              150        0.01    20           0.01   1       123.262
              200        0.01    23           0.01   1       67.6477
              200        0.01    23           0.01   1       37.1259
              500        0.01    23           0.01   1       37.126
              500        0.01    23           0.01   1       37.126
            Chemical: Thickness=[100, 100, 250, 150, 200, 200, 500, 500]; PH=[5.7, 5.6, 5.5, 5.4, 5.4, 5.42226, 5.422, 5.422]; PHUnits=Water
            Nutrient
            Solute NO3: Thickness=[100, 100, 250, 150, 200, 200, 500, 500]; InitialValues=[5, 2, 1, 0, 0, 0, 0, 0]; InitialValuesUnits=ppm; WaterTableConcentration=0; D0=0; DepthConstant=0; MaxDepthSoluteAccessible=0; RunoffEffectivenessAtMovingSolute=0; MaxEffectiveRunoff=0
            Solute NH4: same as Plantation_IxF_Experiment.Treatment.Base.Plantation.SoilBFG.NO3
            Solute Urea: Thickness=[100, 100, 250, 150, 200, 200, 500, 500]; InitialValues=[0, 0, 0, 0, 0, 0, 0, 0]; InitialValuesUnits=kg/ha; WaterTableConcentration=0; D0=0; DepthConstant=0; MaxDepthSoluteAccessible=0; RunoffEffectivenessAtMovingSolute=0; MaxEffectiveRunoff=0
            SoilTemperature CERESSoilTemperature
          SurfaceOrganicMatter: InitialResidueName=Pinus; InitialResidueType=Eucalyptus; InitialResidueMass=0; InitialStandingFraction=0; InitialCPR=0; InitialCNR=0
          Irrigation
          Fertiliser
          Plant Pinus
          Manager TreeManagement
            RowSpace = 2.71
            RowWidth = 3.7
            CultivarName = BFG
            PlantingDate = 16-jun
            HarvestAge = 22
            FertAmount = 50
```csharp
using Models.Soils;
using System.Linq;
using System;
using Models.Core;
using Models.PMF;
using APSIM.Shared.Utilities;

namespace Models
{
    [Serializable] 
    [System.Xml.Serialization.XmlInclude(typeof(Model))]
    public class Script : Model
    {
        [Link] Plant Plant;
        [Link] Clock Clock;
        [Link] Fertiliser Fertiliser;

        public double TimeSincePlanting {get; set;}

        [Description("Spacing (m) between plants within rows")]
        public double RowSpace { get; set; }

        [Description("Spacing (m) between rows")]
        public double RowWidth { get; set; }

        [Description("Cultivar")]
        [Display(Type=DisplayType.CultivarName)]
        public string CultivarName { get; set; }

        [Description("Planting Date (dd-mmm)")]
        public String PlantingDate { get; set; }

        [Description("Harvest Age (years)")]
        public double HarvestAge { get; set; }

        [Description("Amount of fertiliser N to be applied at planting (kg N/ha)")]
        public double FertAmount { get; set; }

        [EventSubscribe("DoManagement")]
        private void OnDoManagement(object sender, EventArgs e)
        {
            double PlantPopulation = 1 / (RowWidth * RowSpace);
            double RowWidthmm = RowWidth * 1000;

            if (DateUtilities.WithinDates(PlantingDate, Clock.Today, PlantingDate) && !Plant.IsAlive)
            {
                Plant.Sow(population: PlantPopulation, 
                    cultivar: CultivarName, 
                    depth: 100, 
                    rowSpacing: RowWidthmm);
                TimeSincePlanting = 0;
                Fertiliser.Apply(amount: FertAmount, type: "NO3N");
            }

            if (TimeSincePlanting > HarvestAge && Plant.IsAlive)
            {
               Plant.Harvest();
               Plant.EndCrop();         
               TimeSincePlanting = 0;  
            }

            TimeSincePlanting += 1.0/365.0;
        }
    }
}
```
          Manager TreeThinning
```csharp
using APSIM.Core;
using Models.Soils;
using System.Xml.Serialization;
using Models.PMF;
using Models.Core;
using System.Collections.Generic;
using System.Linq;
using System;
using Newtonsoft.Json;
using Models.PMF.Interfaces;

namespace Models
{
    [Serializable] 
    [System.Xml.Serialization.XmlInclude(typeof(Model))]
    public class Script : Model, IStructureDependency
    {
        [Link] private Plant Pinus;
        [Link] private Clock Clock;
        
        public IStructure Structure { private get; set; }


        
        [EventSubscribe("StartOfSimulation")]
        private void OnSimulationCommencing(object sender, EventArgs e)
        {
            
        }
        
        public void DoThin(double ThinFr)
        {
            //Set up  array of remove fractions to send with Cut method.  Each member in the array corresponds to an organ in the same order they are set up in.

                //Harvest with manager specified removal fractions
                Pinus.structure?.DoThin(ThinFr);
                var Leaf =   Structure.FindChild<IHasDamageableBiomass>("Leaf", relativeTo: (INodeModel)Pinus);
                var Stem =   Structure.FindChild<IHasDamageableBiomass>("Stem", relativeTo: (INodeModel)Pinus);
                var Branch =   Structure.FindChild<IHasDamageableBiomass>("Branch", relativeTo: (INodeModel)Pinus);
                var FineRoot =   Structure.FindChild<IHasDamageableBiomass>("FineRoot", relativeTo: (INodeModel)Pinus);
                var CoarseRoot =   Structure.FindChild<IHasDamageableBiomass>("CoarseRoot", relativeTo: (INodeModel)Pinus);
                Leaf.RemoveBiomass(liveToRemove: 0, deadToRemove: 0.0, liveToResidue: ThinFr, deadToResidue: 0.0);
                Stem.RemoveBiomass(liveToRemove: 0, deadToRemove: 0.0, liveToResidue: ThinFr, deadToResidue: 0.0);
                Branch.RemoveBiomass(liveToRemove: 0, deadToRemove: 0.0, liveToResidue: ThinFr, deadToResidue: 0.0);
                FineRoot.RemoveBiomass(liveToRemove: 0, deadToRemove: 0.0, liveToResidue: ThinFr, deadToResidue: 0.0);
                CoarseRoot.RemoveBiomass(liveToRemove: 0, deadToRemove: 0.0, liveToResidue: ThinFr, deadToResidue: 0.0);

                Pinus.Population = Pinus.Population*(1-ThinFr);
        }
    }
}
```
          Manager TreeThinningFromAboveOrBelow
```csharp
using APSIM.Core;
using Models.Soils;
using Models.Interfaces;
using APSIM.Shared.Utilities;
using System.Xml.Serialization;
using Models.PMF;
using Models.Core;
using System.Collections.Generic;
using System.Linq;
using System;
using Newtonsoft.Json;
using Models.PMF.Interfaces;

namespace Models
{
    [Serializable] 
    [System.Xml.Serialization.XmlInclude(typeof(Model))]
    public class Script : Model, IStructureDependency
    {
        [Link] private Plant Pinus;
        [Link] private Clock Clock;
        
        public IStructure Structure { private get; set; }



        [EventSubscribe("StartOfSimulation")]
        private void OnSimulationCommencing(object sender, EventArgs e)
        {
            
        }
        
        public void DoThin(double ThinFr)
        {
            //Set up  array of remove fractions to send with Cut method.  Each member in the array corresponds to an organ in the same order they are set up in.
            //Set thinning bias away from average for biomass components (not for population), e.g. 0.5 for thinning from below, and 2 for thinning from above, 
            //i.e. average individual tree size changes

                double ThinBias = 0.7;        

                //Harvest with manager specified removal fractions
                Pinus.structure?.DoThin(ThinFr*ThinBias);
                var Leaf =   Structure.FindChild<IHasDamageableBiomass>("Leaf", relativeTo: (INodeModel)Pinus);
                var Stem =   Structure.FindChild<IHasDamageableBiomass>("Stem", relativeTo: (INodeModel)Pinus);
                var Branch =   Structure.FindChild<IHasDamageableBiomass>("Branch", relativeTo: (INodeModel)Pinus);
                var FineRoot =   Structure.FindChild<IHasDamageableBiomass>("FineRoot", relativeTo: (INodeModel)Pinus);
                var CoarseRoot =   Structure.FindChild<IHasDamageableBiomass>("CoarseRoot", relativeTo: (INodeModel)Pinus);
                Leaf.RemoveBiomass(liveToRemove: 0, deadToRemove: 0.0, liveToResidue: ThinFr*ThinBias, deadToResidue: 0.0);
                Stem.RemoveBiomass(liveToRemove: 0, deadToRemove: 0.0, liveToResidue: ThinFr*ThinBias, deadToResidue: 0.0);
                Branch.RemoveBiomass(liveToRemove: 0, deadToRemove: 0.0, liveToResidue: ThinFr*ThinBias, deadToResidue: 0.0);
                FineRoot.RemoveBiomass(liveToRemove: 0, deadToRemove: 0.0, liveToResidue: ThinFr*ThinBias, deadToResidue: 0.0);
                CoarseRoot.RemoveBiomass(liveToRemove: 0, deadToRemove: 0.0, liveToResidue: ThinFr*ThinBias, deadToResidue: 0.0);

                Pinus.Population = Pinus.Population*(1-ThinFr);
        }
    }
}
```
          Manager AutomaticIrrigation
            allowIrrigation = False
            seasonStart = 1-jan
            seasonEnd = 31-dec
            seasonsAllocation = 2000
            triggerDeficit = 90
            targetDeficit = 98
            returndays = 4
            maximumAmount = 15
            depthPAWC = 400
```csharp
using Newtonsoft.Json;
using APSIM.Shared.Utilities;
using System.Xml.Serialization;
using Models.Soils;
using Models.PMF;
using Models.Core;
using System;
using Models.Interfaces;



        
namespace Models
{
    [Serializable] 
    [System.Xml.Serialization.XmlInclude(typeof(Model))]
    public class Script : Model
    {
        [Link] private ISummary summary;
        [Link] private Irrigation Irrigation;
        [Link] private Clock Clock;
        [Link] private Soil Soil;
        [Link(IsOptional = true)] private IPlant existingCrop;
        private DateTime StartDate;
        private DateTime EndDate;
        private double TopDUL;
        private double TopLL;
        private int nLayers;
        [Link]
        private IPhysical soilPhysical;
        [Link]
        private ISoilWater waterBalance;
        //Communication to other modules
       
        //User inputs from properties tab
        [Description("Turn irrigation on?")]
        public bool allowIrrigation { get; set; }
        [Description("Start of irrigation season (dd-MMM)")]
        public string seasonStart { get; set; }
        [Description("End of irrigation season (dd-MMM)")]
        public string seasonEnd { get; set; }
        [Description("Season allocation (mm)")]
        public double seasonsAllocation { get; set; }
        [Description("Deficit to trigger irrigation (% PAWC)")]
        public double triggerDeficit { get; set; }
        [Description("Deficit to stop irrigaton (% PAWC)")]
        public double targetDeficit { get; set; }
        [Description("Minimum days for irrigation to return")]
        public double returndays { get; set; }
        [Description("Maximum irrigation application (mm/day)")]
        public double maximumAmount { get; set; }
        [Description("Depth to calculate PAWC (mm)")]
        public double depthPAWC { get; set; }

        //Class members
        [JsonIgnore] public double TopSWdeficit { get; set; }
        [JsonIgnore] public double TopSWC { get; set; }
        [JsonIgnore] public double DaysSinceIrrigation { get; set; }
        [JsonIgnore] public double AmountToApply { get; set; }
        [JsonIgnore] public double SeasonAppliedAmount { get; set; }
        
        private bool IrrigationIsAllowed { get; set; }
        private bool SeasonIsOpen { get; set; }
        private bool CropIsActive { get; set; }
        private bool IrrigatorIsAvailable { get; set; }
        private bool SoilIsDry { get; set; }



        public void TurnOn()
        {
        allowIrrigation=true;
        IrrigationIsAllowed=true;
        }
        public void TurnOff()
        {
        allowIrrigation=false;
        IrrigationIsAllowed=false;
        }


        //Calculate static soil variables
        [EventSubscribe("StartOfSimulation")]
        private void OnStartOfSimulation(object sender, EventArgs e)
        {   
            //Set the season dates
            StartDate = DateTime.Parse(seasonStart + "-" + Clock.Today.Year.ToString());
            EndDate = DateTime.Parse(seasonEnd + "-" + Clock.Today.Year.ToString());
            
            //Can we irrigate at all?
            IrrigationIsAllowed = false; 
            if (allowIrrigation)
                IrrigationIsAllowed = true; 

            //Calculate soil water variables
            double depthFromSurface = 0.0;
            double fracLayer = 0.0;
            nLayers = soilPhysical.Thickness.Length;
            for (int layer = 0; layer < nLayers; layer++)
            {
                fracLayer = Math.Min(1.0, (depthPAWC - depthFromSurface) / soilPhysical.Thickness[layer]);
                TopLL += soilPhysical.LL15mm[layer] * fracLayer;
                TopDUL += soilPhysical.DULmm[layer] * fracLayer;
                depthFromSurface += soilPhysical.Thickness[layer];
                if (depthFromSurface >= depthPAWC)
                    layer = nLayers;
            }
        }
             
        //Determine daily requirement for irrigation
        [EventSubscribe("StartOfDay")]
        private void OnStartOfDay(object sender, EventArgs e)
        {
            //Can we irrigate today?          
            SeasonIsOpen = isBetween(Clock.Today, StartDate, EndDate);
            if (!SeasonIsOpen)
                SeasonAppliedAmount = 0;

            //Is there a crop in the ground that needs irrigation?
            CropIsActive = false;
            if ((existingCrop != null) && (existingCrop.IsAlive))
                CropIsActive = true;
            //if ((existingCrop.Phenology.Stage >= 3.0) && (existingCrop.Phenology.Stage < 6.0))
          
            //Is the irrigator available?
            IrrigatorIsAvailable = false;
            DaysSinceIrrigation += 1;
            if (DaysSinceIrrigation >= returndays)
                IrrigatorIsAvailable = true;
          
            //Is the soil dry enough to require irrigation?
            SoilIsDry = false;
            double depthFromSurface = 0.0;
            double fracLayer = 0.0;
            TopSWC = 0.0;
            for (int layer = 0; layer < nLayers; layer++)
            //for (int layer = 0; depthFromSurface < depthPAWC + soilPhysical.Thickness[layer]; layer++)
            {
                fracLayer = Math.Min(1.0, (depthPAWC - depthFromSurface) / soilPhysical.Thickness[layer]);
                TopSWC += waterBalance.SWmm[layer] * fracLayer;
                depthFromSurface += soilPhysical.Thickness[layer];
                if (depthFromSurface >= depthPAWC)
                    layer = nLayers;
            }
            
            TopSWdeficit = TopSWC - TopDUL;
            if (Math.Max(0.0, -TopSWdeficit) >= (TopDUL - TopLL) * (100 - triggerDeficit) / 100)
                SoilIsDry = true;
                
            //Are all the conditions ratifying irrigation
            if (IrrigationIsAllowed && SeasonIsOpen && CropIsActive && IrrigatorIsAvailable && SoilIsDry)
            {
                //Lets bloody well irrigate then!!!!
                AmountToApply = TopDUL * targetDeficit / 100 - TopSWC;
                AmountToApply = Math.Max(0.0, Math.Min(AmountToApply, seasonsAllocation - SeasonAppliedAmount));
                AmountToApply = Math.Min(AmountToApply,maximumAmount);
                Irrigation.Apply(AmountToApply);
                DaysSinceIrrigation = 0;
                SeasonAppliedAmount += AmountToApply;
            }
        }
        
        ///Checks whether theDate is between iniDate and endDate (non-year specific)
        private bool isBetween(DateTime theDay, DateTime iniDate, DateTime endDate)
        {
            bool result = false;
            if (iniDate.DayOfYear < endDate.DayOfYear)
            {
                // period is within one year, ex: summer in the northern hemisphere
                if ((theDay.DayOfYear >= iniDate.DayOfYear) && (theDay.DayOfYear <= endDate.DayOfYear))
                    result = true;
            }
            else
            {
                // period goes over the end of the year, ex: summer in the southern hemisphere
                if ((theDay.DayOfYear >= iniDate.DayOfYear) || (theDay.DayOfYear <= endDate.DayOfYear))
                    result = true;
            }
            
            return result;
        }
    }
}
```
          Operations Management
          Report AnnualReport: EventNames=[Clock].EndOfYear
            VariableNames:
              [Clock].Today
              ([Nutrient].MineralisedN[1]+[Nutrient].MineralisedN[2]+[Nutrient].MineralisedN[3])*10 as NNMkg45cmAnnual
          Report: EventNames=[Clock].DoReport
            VariableNames:
              [Clock].Today
              //[TreeManagement].Script.CultivarName. as Cultivar
              [Pinus].Age
              [Pinus].Population*10000 as stemsperha
              [Pinus].AboveGround.Wt
              [Pinus].AboveGround.N
              [Pinus].BelowGround.Wt
              [Pinus].Leaf.Dead.Wt
              [Pinus].Leaf.Live.Wt
              [Pinus].Leaf.Live.NConc
              [Pinus].Leaf.Wt
              [Pinus].Branch.Live.Wt
              [Pinus].Branch.Dead.Wt
              [Pinus].Branch.Wt
              [Pinus].Leaf.Detached.Wt
              [Pinus].Stem.Live.Wt
              [Pinus].Total.N
              [Pinus].Leaf.Live.NConc
              [Pinus].Cone.Live.NConc
              [Pinus].Branch.Live.NConc
              [Pinus].Stem.Live.NConc
              [Pinus].CoarseRoot.Live.NConc
              [Pinus].FineRoot.Live.NConc
              [Pinus].Leaf.Live.N*10 as LiveFoliarN
              [Pinus].Leaf.N*10 as TotalFoliarN
              [Pinus].Leaf.CoverGreen
              [Pinus].Leaf.SpecificLeafArea
              [Pinus].Leaf.LAI
              [Pinus].LAI
              [Pinus].Leaf.Fn
              [Pinus].Leaf.Fw
              [Pinus].TotalLive.Wt
              ([Pinus].Leaf.Transpiration + [Soil].SoilWater.Es + [MicroClimate].PrecipitationInterception) as ET
              [Pinus].IndividualTreeStemWt
              [Pinus].IndividualTreeLiveWt
              [Pinus].Stem.DBH
              [Pinus].Stem.Ht
              [Pinus].RootShootRatio
              [Pinus].Stem.Vol
              [Pinus].Stem.MAI
              [Pinus].Stem.BA
              [Pinus].Stem.BarkThickness
              [Pinus].Stem.BarkWt
              [Pinus].Stem.BAub
              [Pinus].Stem.DBHub
              [Pinus].Stem.MAIub
              [Pinus].Stem.VolBark
              [Pinus].Stem.Volub
              [Pinus].Stem.WoodDensity
              [Pinus].Stem.BarkDensity
              [Pinus].Stem.WoodWt
              [Pinus].Stem.Wt
              [Pinus].Stem.Live.Wt
              [Pinus].FineRoot.Wt
              [Pinus].CoarseRoot.Wt
              [Pinus].Cone.Wt
              [Pinus].TotalWoodBark.Wt
              //(([Soil].Water.Volumetric[2])+([Soil].Water.Volumetric[3]))/2 as SW30
              //(([Soil].Water.Volumetric[2])+([Soil].Water.Volumetric[3]))/2 as SW30
              //(([Soil].Water.Volumetric[9])+([Soil].Water.Volumetric[10]))/2 as SW600
              sum ([SoilWater].PAWmm) as PAWmmTotal
              [Soil].Water.MM[1] as SWmmD1
              [SoilWater].Evaporation[1]
              [SoilWater].Drainage[1]
              [SoilWater].Flux[1]
              [SoilWater].Flow[1]
              [SoilWater].Infiltration[1]
              [SoilWater].LateralFlow[1]
              [SoilWater].LateralOutflow
              [SoilWater].Runoff[1]
              [MicroClimate].PrecipitationInterception
              [Pinus].FineRoot.WaterUptake[1]
              [Soil].Water.Volumetric[1] as SWD1
              [Soil].Water.Volumetric[2] as SWD2
              [Soil].Water.Volumetric[3] as SWD3
              [Soil].Water.Volumetric[4] as SWD4
              //[Soil].Water.Volumetric[5] as SWD5
              //[Soil].Water.Volumetric[6] as SWD6
              //[Soil].Water.Volumetric[7] as SWD7
              //[Soil].Water.Volumetric[8] as SWD8
              sum([Soil].Water.MM) as SWmmTotal
              //[Soil].NO3ppm
              //[Soil].NH4ppm
              //[Soil].NO3.kgha
              //[Soil].NH4.kgha[1]
              //[Soil].NO3.kgha[1]
              ([Soil].NO3.kgha + [Soil].NH4.kgha) as MineralNkgpha
              sum ([Soil].NH4.kgha) as NH4Nkgpha
              sum ([Soil].NO3.kgha) as NO3Nkgpha
              (sum ([Soil].NH4.kgha)+ sum ([Soil].NO3.kgha)) as MineralNTotalkgpha
              //([Soil].NO3.kgha[1]*1000000/14)/([Soil].Water.Volumetric[1]*1000000) as NO3mMD1
              //([Soil].NO3.kgha[2]*1000000/14)/([Soil].Water.Volumetric[2]*1000000) as NO3mMD2
              //([Soil].NO3.kgha[3]*1000000/14)/([Soil].Water.Volumetric[3]*1000000) as NO3mMD3
              //([Soil].NH4.kgha[1]*1000000/14)/([Soil].Water.Volumetric[1]*1000000) as NH4mMD1
              //([Soil].NH4.kgha[2]*1000000/14)/([Soil].Water.Volumetric[2]*1000000) as NH4mMD2
              //([Soil].NH4.kgha[3]*1000000/14)/([Soil].Water.Volumetric[3]*1000000) as NH4mMD3
              [Irrigation].IrrigationApplied
              [Weather].Rain
          Report HarvestReport: same as Replacements.HarvestReport
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