Simulations: Version=210
  DataStore
  Folder Replacements
    Plant Maize
    Plant Wheat
      Cultivar Yecora
        Command:
          [Phenology].Phyllochron.BasePhyllochron.FixedValue = 90
          [Leaf].CohortParameters.MaxArea.AreaLargestLeaves.FixedValue = 4000
          [Phenology].CAMP.FLNparams.MinLN = 7
          [Phenology].CAMP.FLNparams.PpLN = 2
          [Phenology].CAMP.FLNparams.VrnLN = 2
          [Phenology].CAMP.FLNparams.VxPLN = 2
          [Phenology].HeadEmergenceLongDayBase.FixedValue = 110
          [Phenology].HeadEmergencePpSensitivity.FixedValue = 0
          [Phenology].CAMP.EnvData.VrnTreatTemp = 6
          [Phenology].CAMP.EnvData.VrnTreatDuration = 60
      Cultivar YecoraEdit
        Command:
          [Phenology].Phyllochron.BasePhyllochron.FixedValue = 90
          [Leaf].CohortParameters.MaxArea.AreaLargestLeaves.FixedValue = 4000
          [Phenology].CAMP.FLNparams.MinLN = 7
          [Phenology].CAMP.FLNparams.PpLN = 2
          [Phenology].CAMP.FLNparams.VrnLN = 2
          [Phenology].CAMP.FLNparams.VxPLN = 2
          [Phenology].HeadEmergenceLongDayBase.FixedValue = 110
          [Phenology].HeadEmergencePpSensitivity.FixedValue = 0
          [Phenology].CAMP.EnvData.VrnTreatTemp = 6
          [Phenology].CAMP.EnvData.VrnTreatDuration = 60
          [Wheat].Leaf.Photosynthesis.RUE.FixedValue =0.45
      Cultivar Yecora___edited
        Command:
          [Phenology].Phyllochron.BasePhyllochron.FixedValue=75
          [Leaf].CohortParameters.MaxArea.AreaLargestLeaves.FixedValue=4000
          [Phenology].CAMP.FLNparams.MinLN=7
          [Phenology].CAMP.FLNparams.PpLN=2
          [Phenology].CAMP.FLNparams.VrnLN=2
          [Phenology].CAMP.FLNparams.VxPLN=2
          [Phenology].HeadEmergenceLongDayBase.FixedValue=110
          [Phenology].HeadEmergencePpSensitivity.FixedValue=0
          [Phenology].CAMP.EnvData.VrnTreatTemp=6
          [Phenology].CAMP.EnvData.VrnTreatDuration=60
          [Wheat].Leaf.Photosynthesis.RUE.FixedValue=1.24
    Plant Soybean
    Cultivar Rex
      Command:
        [Grain].NumberFunction.GrainNumber.GrainsPerGramOfStem.FixedValue = 18
        [Grain].MaximumNConc.FixedValue = 0.02
        [Phenology].CAMP.FLNparams.MinLN = 7
        [Phenology].CAMP.FLNparams.PpLN = 4.0
        [Phenology].CAMP.FLNparams.VrnLN = 6
        [Phenology].CAMP.FLNparams.VxPLN = 0.0
  Simulation P3051
    Clock: Start=2000-01-01; End=2020-12-31
    Summary SummaryFile
    Weather: FileName=D:/agent/app/07435510-6a73-4236-b0b1-2f5d11bc98b8.met
    SoilArbitrator Soil Arbitrator
    Zone Field1: Area=1; Slope=0; AspectAngle=0; Altitude=50
      Report Carbon: EventNames=[Clock].EndOfSimulation
        VariableNames:
          [Clock].Today
          [Clock].Today.Year as Year
          [Clock].Today.Month as Month
          [Maize].AboveGround.Wt * 10  as AGB
          [Maize].AboveGround.N
          [Maize].Grain.Total.Wt * 10 as Yield
          [Soil].Nutrient.TotalC[1]/1000 as soc0_10cm
          [Soil].Nutrient.TotalC[2]/1000 as SOC10_30cm
          sum of sum([Nutrient].N2Oatm from 01-jan to [Clock].Today as N2O
          sum of sum([Nutrient].N2Oatm[1:6]) from 01-jan to [Clock].Today as TopN2O
          diff of sum([Soil].Nutrient.TotalC[1:2])/1000 from [Clock].StartOfSimulation to [Clock].EndOfSimulation as changeincarbon
          [Report].Name as Plotid
          [Soil].SoilType
          [Soil].Longitude as longitude
          [Soil].Latitude as latitude
          [Soil].Site as gridcode
          [Soil].RecordNumber as OBJECTID
      Report WheatR: EventNames=[wheat].Harvesting
        VariableNames:
          [Clock].Today
          [Clock].Today.Year as Year
          [Clock].Today.Month as Month
          [Wheat].AboveGround.Wt *10 as AGB
          [Wheat].AboveGround.N
          [Soil].Nutrient.TotalC[1]/1000 as soc0_10cm
          [Soil].Nutrient.TotalC[2]/1000 as SOC10_30cm
          sum of sum([Nutrient].N2Oatm from 01-jan to [Clock].Today as N2O
          sum of sum([Nutrient].N2Oatm[1:6]) from 01-jan to [Clock].Today as TopN2O
          sum([Soil].NO3.kgha) as NO3Total
          sum([Soil].NH4.kgha) as NH4Total
          sum of sum([Soil].Nutrient.DenitrifiedN) as Denitrification
          [Report].Name as Plotid
          [Soil].Longitude as longitude
          [Soil].Latitude as latitude
          [Soil].Site as gridcode
          [Soil].RecordNumber as OBJECTID
      Report MaizeR: EventNames=[Maize].Harvesting
        VariableNames:
          [Clock].Today
          [Clock].Today.Year as Year
          [Clock].Today.Month as Month
          [Maize].AboveGround.Wt*10  as AGB
          [Maize].AboveGround.N
          [Maize].Grain.Total.Wt * 10 as Yield
          [Soil].Nutrient.TotalC[1]/1000 as soc0_10cm
          [Soil].Nutrient.TotalC[2]/1000 as SOC10_30cm
          sum of sum([Nutrient].N2Oatm from 01-jan to [Clock].Today as N2O
          sum of sum([Nutrient].N2Oatm[1:6]) from 01-jan to [Clock].Today as TopN2O
          sum([Soil].NO3.kgha) as NO3Total
          sum([Soil].NH4.kgha) as NH4Total
          sum of sum([Soil].Nutrient.DenitrifiedN) as Denitrification
          [Report].Name as Plotid
          [Soil].Longitude as longitude
          [Soil].Latitude as latitude
          [Soil].Site as gridcode
          [Soil].RecordNumber as OBJECTID
          [Soil].SoilType as soiltype
      Report Annual: EventNames=[Clock].EndOfYear
        VariableNames:
          [Clock].Today
          [Clock].Today.Year as Year
          [Clock].Today.Month as Month
          sum([Soil].Nutrient.TotalC[1:2])/1000 as Toplayer_soil_Carbon
          sum of sum([Nutrient].Catm[1:6]) from 01-jan to [Clock].Today as Top_respiration
          sum of sum([Nutrient].Catm[1:10]) from 01-jan to [Clock].Today as Whole_repsiration
          sum of sum([Nutrient].N2Oatm) from 01-jan to [Clock].Today as n20
          sum of sum([Nutrient].N2Oatm[1:6]) from 01-jan to [Clock].Today as TopN2O
          [Soil].Nutrient.TotalC[1]/1000 as SOC1
          Sum of [Soil].SoilWater.LeachNO3 from 1-Jan to [Clock].Today as CumulativeAnnualLeaching
          sum([Soil].Nutrient.TotalC[1:2])/1000 as SOC2
      Report SoybeanR: EventNames=[Soybean].Harvesting
        VariableNames:
          [Clock].Today
          [Clock].Today.Year as Year
          [Clock].Today.Month as Month
          [Soybean].AboveGround.Wt*10  as AGB
          [Soybean].AboveGround.N
          [Soybean].Grain.Total.Wt * 10 as SoyYield
          [Soil].Nutrient.TotalC[1]/1000 as soc0_10cm
          [Soil].Nutrient.TotalC[2]/1000 as SOC10_30cm
          sum of sum([Nutrient].N2Oatm from 01-jan to [Clock].Today as N2O
          sum of sum([Nutrient].N2Oatm[1:6]) from 01-jan to [Clock].Today as TopN2O
          sum([Soil].NO3.kgha) as NO3Total
          sum([Soil].NH4.kgha) as NH4Total
          sum of sum([Soil].Nutrient.DenitrifiedN) as Denitrification
          [Report].Name as Plotid
          [Soil].Longitude as longitude
          [Soil].Latitude as latitude
          [Soil].Site as gridcode
          [Soil].RecordNumber as OBJECTID
          [Soil].SoilType as soiltype
      SurfaceOrganicMatter: InitialResidueName=soybean; InitialResidueType=soybean; InitialResidueMass=1250; InitialStandingFraction=0; InitialCPR=0; InitialCNR=27
      Fertiliser
      Plant Maize
      MicroClimate: a_interception=0; b_interception=1; c_interception=0; d_interception=0; SoilHeatFluxFraction=0.4; MinimumHeightDiffForNewLayer=0; NightInterceptionFraction=0.5; ReferenceHeight=2
      Plant Soybean
      Plant Wheat
      Manager SowMaize
        Rotations = [Simple Rotation]
        Crop = [Maize]
        StartDate = 1-May
        EndDate = 15-May
        MinESW = 200
        MinRain = 30
        RainDays = 3
        CultivarName = B_110
        SowingDepth = 50
        RowSpacing = 750
        Population = 8.65
        MustSow = True
```csharp
using System;
using APSIM.Core;
using APSIM.Numerics;
using APSIM.Shared.Utilities;
using APSIM.Shared.Documentation;
using Models.Climate;
using Models.Core;
using Models.Interfaces;
using Models.PMF;
using Models.Soils;
using Models.Utilities;

namespace Models
{
    [Serializable]
    public class Script : Model, IStructureDependency
    {
        [Link] private Clock Clock;
        [Link] private Summary Summary;
        [Link] private ISoilWater waterBalance;

        private Accumulator accumulatedRain;

        public IStructure Structure { get; set; }

        [Description("Simple Rotation Manager")]
        public Manager Rotations { get; set; }

        [Separator("Sowing Info")]

        [Description("Crop")]
        public IPlant Crop { get; set; }

        [Description("Start of sowing window (d-mmm)")]
        public string StartDate { get; set; }

        [Description("End of sowing window (d-mmm)")]
        public string EndDate { get; set; }

        [Description("Minimum extractable soil water for sowing (mm)")]
        public double MinESW { get; set; }

        [Description("Accumulated rainfall required for sowing (mm)")]
        public double MinRain { get; set; }

        [Description("Duration of rainfall accumulation (d)")]
        public int RainDays { get; set; }

        [Display(Type = DisplayType.CultivarName)]
        [Description("Cultivar to be sown")]
        public string CultivarName { get; set; }

        [Description("Sowing depth (mm)")]
        public double SowingDepth { get; set; }

        [Description("Row spacing (mm)")]
        public double RowSpacing { get; set; }

        [Description("Plant population (/m2)")]
        public double Population { get; set; }

        [Description("Must sow by end date?")]
        public bool MustSow { get; set; }

        [EventSubscribe("StartOfSimulation")]
        private void OnSimulationCommencing(object sender, EventArgs e)
        {
            accumulatedRain = new Accumulator(this, "[Weather].Rain", RainDays);
        }

        [EventSubscribe("DoManagement")]
        private void OnDoManagement(object sender, EventArgs e)
        {
            accumulatedRain.Update();

            if (!Crop.IsAlive &&
                DateUtilities.WithinDates(StartDate, Clock.Today, EndDate))
            {
                double rainSum = accumulatedRain.Sum;
                double eswSum = MathUtilities.Sum(waterBalance.ESW);

                if ((rainSum > MinRain && eswSum > MinESW) ||
                    (DateUtilities.DatesEqual(EndDate, Clock.Today) && MustSow))
                {
                    string thisCrop = Crop.Name.ToLower();

                    string nextCrop =
                        Structure?
                            .GetObject("Script.NextCrop")?
                            .Value as string;

                    if (thisCrop == (nextCrop?.ToLower() ?? thisCrop))
                    {
                        Crop.Sow(
                            population: Population,
                            cultivar: CultivarName,
                            depth: SowingDepth,
                            rowSpacing: RowSpacing);
                    }
                }
            }
        }
    }
}
```
      Manager SowWheat
        Rotations = [Simple Rotation]
        Crop = [Wheat]
        StartDate = 27-sep
        EndDate = 5-oct
        MinESW = 100
        MinRain = 15
        RainDays = 7
        CultivarName = Yecora___edited
        SowingDepth = 10
        RowSpacing = 250
        Population = 100
        MustSow = True
        script: same as in P3051.Field1.SowMaize
      Manager HarvestMaize
        Crop = [Maize]
        Date = 20-apr
```csharp
using APSIM.Shared.Utilities;
using Models.Utilities;
using Models.Soils;
using Models.PMF;
using Models.Core;
using System;

namespace Models
{
    [Serializable] 
    public class Script : Model
    {
        [Link] IClock Clock;
        
        [Separator("Harvesting script that forces harvesting")]
        [Description("Crop")]
        public IPlant Crop { get; set; }
        
        [Description("Date to force harvesting by if crop is not ready (d-mmm)")]
        public string Date { get; set; }
        
        [EventSubscribe("DoManagement")]
        private void OnDoManagement(object sender, EventArgs e)
        {
            if (Crop.IsReadyForHarvesting || 
                (DateUtilities.DatesAreEqual(Date, Clock.Today) && Crop.IsAlive))
            {
                Crop.Harvest();
                Crop.EndCrop();
            }
        }
    }
}
```
      Manager SowSoy
        Rotations = [Simple Rotation]
        Crop = [Soybean]
        StartDate = 1-may
        EndDate = 25-May
        MinESW = 200
        MinRain = 30
        RainDays = 3
        CultivarName = IA2008_MG20
        SowingDepth = 50
        RowSpacing = 750
        Population = 30
        MustSow = True
```csharp
using System;
using APSIM.Core;
using APSIM.Numerics;
using APSIM.Shared.Utilities;
using Models.Climate;
using Models.Core;
using Models.Interfaces;
using Models.PMF;
using Models.Soils;
using Models.Utilities;
using APSIM.Shared.Documentation;

namespace Models
{
    [Serializable]
    public class Script : Model, IStructureDependency
    {
        [Link] private Clock Clock;
        [Link] private Summary Summary;
        [Link] private ISoilWater waterBalance;

        private Accumulator accumulatedRain;

        public IStructure Structure { get; set; }

        [Description("Simple Rotation Manager")]
        public Manager Rotations { get; set; }

        [Separator("Sowing Info")]

        [Description("Crop")]
        public IPlant Crop { get; set; }

        [Description("Start of sowing window (d-mmm)")]
        public string StartDate { get; set; }

        [Description("End of sowing window (d-mmm)")]
        public string EndDate { get; set; }

        [Description("Minimum extractable soil water for sowing (mm)")]
        public double MinESW { get; set; }

        [Description("Accumulated rainfall required for sowing (mm)")]
        public double MinRain { get; set; }

        [Description("Duration of rainfall accumulation (d)")]
        public int RainDays { get; set; }

        [Display(Type = DisplayType.CultivarName)]
        [Description("Cultivar to be sown")]
        public string CultivarName { get; set; }

        [Description("Sowing depth (mm)")]
        public double SowingDepth { get; set; }

        [Description("Row spacing (mm)")]
        public double RowSpacing { get; set; }

        [Description("Plant population (/m2)")]
        public double Population { get; set; }

        [Description("Must sow by end date?")]
        public bool MustSow { get; set; }

        [EventSubscribe("StartOfSimulation")]
        private void OnSimulationCommencing(object sender, EventArgs e)
        {
            accumulatedRain = new Accumulator(this, "[Weather].Rain", RainDays);
        }

        [EventSubscribe("DoManagement")]
        private void OnDoManagement(object sender, EventArgs e)
        {
            accumulatedRain.Update();

            if (!Crop.IsAlive &&
                DateUtilities.WithinDates(StartDate, Clock.Today, EndDate))
            {
                double rainSum = accumulatedRain.Sum;
                double eswSum = MathUtilities.Sum(waterBalance.ESW);

                if ((rainSum > MinRain && eswSum > MinESW) ||
                    (DateUtilities.DatesEqual(EndDate, Clock.Today) && MustSow))
                {
                    string thisCrop = Crop.Name.ToLower();

                    string nextCrop =
                        Structure?
                            .GetObject("Script.NextCrop")?
                            .Value as string;

                    if (thisCrop == (nextCrop?.ToLower() ?? thisCrop))
                    {
                        Crop.Sow(
                            population: Population,
                            cultivar: CultivarName,
                            depth: SowingDepth,
                            rowSpacing: RowSpacing);
                    }
                }
            }
        }
    }
}
```
      Manager HarvestSoy
        Crop = [Soybean]
        Date = 19-Oct
        script: same as in P3051.Field1.HarvestMaize
      Manager Simple Rotation
        Crops = Maize, Wheat
```csharp
using Models.Soils;
using System.Collections.Generic;
using APSIM.Shared.Utilities;
using Models.PMF;
using Models.Interfaces;
using Models.Core;
using System;

namespace Models
{
    [Serializable]
    public class Script : Model
    {
        [Link] IClock Clock;
        [Link] ISummary Summary;
        
        [Description("Rotation Sequence (comma separated crop names)")]
        public string[] Crops { get; set; }
        
        // Repeating cycle of input crops. Don't loop on this, loop on Crops
        private IEnumerable<string> cropsEnum()
        {
            var counter = 0;
            while (true)
            {
                yield return Crops[counter];
                ++counter;
                if (counter >= Crops.Length)
                    counter = 0;
            }
        }
        
        private IEnumerator<string> cropCycle;
        
        [Description("Next crop to sow in the simple rotation.")]
        public string NextCrop
        { get => cropCycle.Current; }
        
        [EventSubscribe("StartOfSimulation")]
        private void Init(object sender, EventArgs e)
        {
            // TODO: Error if Crops is empty.
            cropCycle = cropsEnum().GetEnumerator();
            // Set to first value.
            cropCycle.MoveNext();
        }

        [EventSubscribe("PlantEnding")]
        private void OnEndCrop(object sender, EventArgs e)
        {
            // Currently assumes only one crop in the ground, so does not check if the  
            // harvested crop is this script's current crop.
            var old = NextCrop;
            cropCycle.MoveNext();
            var _new = NextCrop;
            Summary.WriteMessage(this, $"Rotation finished with {old}, next up: {_new}.", MessageType.Information);
        }
    }
}
```
      Manager AddfertlizerRotationMAize
        Crop = [Maize]
        FertiliserType = UreaN
        Fraction = 1
        Amount = 246
        FertiliserDates = 30-may
        AmountType = True
```csharp
using Models.Soils;
using System;
using Models.Core;
using Models.PMF;
using APSIM.Shared.Utilities;
namespace Models
{
    [Serializable]
    public class Script : Model
    {
        [Link] Clock Clock;
        
        [Link] Fertiliser Fertiliser;
        [Link] ISummary Summary;
        [Separator("Crop in the rotation to apply fertilizers")]
        [Description("Crop")]
        public IPlant Crop { get; set; }
        
        [Separator("Fertilizer application details")]

        [Description("Type of fertiliser to apply? Select from a list. ")] 
        [Display(Type = DisplayType.FertiliserType)]public string FertiliserType { get; set; }
        
        [Description("Fraction to apply at sowing (0-1). if it is a single application, it should be 1")]
        public double Fraction { get; set; }

        [Description("Enter the total amount of fertiliser to be applied (kg /ha)")] 
        public double Amount { get; set; }
        
        [Description("Enter other dates as dd-mmm with comma separation (any year information entered will be ignored): ")] 
        public string[] FertiliserDates { get; set; } 
        
        [Description("Is the remaining amount to be applied each time? (true/ticked)? Or is it the total annual amount across all dates (no(false)/unticked)")] 
        public bool AmountType { get; set; }
        
        [EventSubscribe("Sowing")]
        private void OnSowing(object sender, EventArgs e)
        {
            Model crop = sender as Model;
            var nit = Fraction * Amount;
            if (Crop != null && crop.Name.ToLower() == (Crop as IModel).Name.ToLower())
                Fertiliser.Apply(amount: nit, type: FertiliserType);
        }
        
        [EventSubscribe("DoManagement")]
        private void OnDoManagement(object sender, EventArgs e)
        {
            foreach (string ddMMM in FertiliserDates)
            {
             var nit = Fraction * Amount;
             var otherNapp = Amount - nit;
                if (Crop.IsAlive & DateUtilities.DatesEqual(ddMMM, Clock.Today))
                {
                    if (AmountType)
                        Fertiliser.Apply(amount: otherNapp, type: FertiliserType);
                        
                    else
                        Fertiliser.Apply(amount: otherNapp / FertiliserDates.Length, type: FertiliserType);
                        Summary.WriteMessage(this, $"At other date(s), {Crop.Name} received {otherNapp} Kg of Nitrogen applied as {FertiliserType}. {AmountType} was selected: true implies that the user specified amount was applied on each date and false implies that the amount was applied across dates", MessageType.Information);
                }
            }
        }
    }
}
```
      Manager AddfertlizerRotationWheat
        Crop = [Wheat]
        FertiliserType = UreaN
        Fraction = 0.3777778
        Amount = 180
        FertiliserDates = 20-march
        AmountType = False
        script: same as in P3051.Field1.AddfertlizerRotationMAize
      Manager HarvestWheat
        Crop = [Wheat]
        Date = 28-apr
```csharp
using System;
using APSIM.Shared.Utilities;
using APSIM.Shared.Documentation;
using Models.Core;
using Models.PMF;
using Models.Soils;
using Models.Utilities;

namespace Models
{
    [Serializable]
    public class Script : Model
    {
        [Link] private Clock Clock;

        [Separator("Harvesting script that forces harvesting")]
        [Description("Crop")]
        public IPlant Crop { get; set; }

        [Description("Date to force harvesting by if crop is not ready (d-mmm)")]
        public string Date { get; set; }

        [EventSubscribe("DoManagement")]
        private void OnDoManagement(object sender, EventArgs e)
        {
            if (Crop.IsReadyForHarvesting ||
                (DateUtilities.DatesEqual(Date, Clock.Today) && Crop.IsAlive))
            {
                Crop.Harvest();
                Crop.EndCrop();
            }
        }
    }
}
```
      Manager PostharvestillageWheat
        Crop = [Wheat]
        Fraction = 1
        Depth = 150
```csharp
using Models.Soils;
using System;
using Models.Core;
using Models.PMF;
using APSIM.Shared.Utilities;
using Models.Surface;

namespace Models
{
    [Serializable]
    public class Script : Model
    {
        [Link] Clock Clock;
        [Link] SurfaceOrganicMatter SOM;
        
        [Separator("Crop Field to apply tillage")]
        [Description("Crop")]
        public IPlant Crop { get; set; }
        
        [Description("Fraction of Residues To Incorporate (0-1)")]
        public double Fraction { get; set; }

        [Description("Depth of Tillage (mm)")]
        public double Depth { get; set; }

        [EventSubscribe("PlantEnding")]
        private void OnEndCrop(object sender, EventArgs e)
        {
         
            Model crop = sender as Model;
            if (Crop != null && crop.Name.ToLower() == (Crop as IModel).Name.ToLower())
            SOM.Incorporate(Fraction, Depth);
        }
    }
}
```
      Manager PostharvestillageSoybean
        Crop = [Soybean]
        Fraction = 1
        Depth = 150
        script: same as in P3051.Field1.PostharvestillageWheat
      Manager PostharvestillageMaize
        Crop = [Maize]
        Fraction = 1
        Depth = 150
        script: same as in P3051.Field1.PostharvestillageWheat
      Soil Muscatune:244911: SoilType=Nicollet loam, 1 to 3 percent slopes; LocalName=Nicollet; Latitude=42.0857; Longitude=-93.658723; Comments=number of layers: 10, max depth: 2400mm
        DataSource:
          Nicollet: downloaded by apsimNGpy: `DownloadsurgoSoiltables`
           accessed from SSURGO on: 2026-01-12T21:34:17
        Physical
          Thickness  ParticleSizeSand  ParticleSizeSilt  ParticleSizeClay  BD       AirDry    LL15      DUL       SAT       KS
          100        31                43                26                1.272    0.0825    0.165     0.375961  0.5       792.45
          100        31                43                26                1.378    0.1494    0.166     0.374961  0.46      792.45
          100        33.5005           40.4995           26                1.4045   0.1492    0.1575    0.352509  0.45      792.45
          295        36.001            37.999            26                1.431    0.149     0.149     0.329058  0.44      792.45
          297        37.8567           37.7144           24.429            1.46129  0.141286  0.141286  0.321339  0.428571  792.45
          298        39.7134           37.4287           22.8579           1.49157  0.133571  0.133571  0.313625  0.417143  792.45
          300        41.5701           37.1431           21.2869           1.52186  0.125857  0.125857  0.305911  0.405714  792.45
          301        43.4268           36.8574           19.7158           1.55214  0.118143  0.118143  0.298197  0.394286  792.45
          303        45.2834           36.5718           18.1448           1.58243  0.110429  0.110429  0.290482  0.382857  792.45
          304        47.1401           36.2861           16.5737           1.61271  0.102714  0.102714  0.282768  0.371429  792.45
          SoilCrop MaizeSoil
            LL=[0.0825, 0.1494, 0.1492, 0.149, 0.141286, 0.133571, 0.125857, 0.118143, 0.110429, 0.102714]
            KL=[0.08, 0.0654985, 0.0536256, 0.0439049, 0.0359463, 0.0294304, 0.0240955, 0.0197278, 0.0161517, 0.0132239]
            XF=[1, 1, 1, 1, 1, 1, 1, 1, 1, 1]
          SoilCrop SoybeanSoil: same as P3051.Field1.Muscatune:244911.Physical.MaizeSoil
          SoilCrop WheatSoil: same as P3051.Field1.Muscatune:244911.Physical.MaizeSoil
        Organic: FOMCNRatio=40; CarbonUnits=Total
          Thickness  Carbon    SoilCNRatio  FBiom       FInert    FOM
          100        3.48837   12           0.0395      0.65      150
          100        2.32587   12           0.035       0.668     122.81
          100        1.52588   12           0.0301644   0.846767  100.548
          295        0.726176  12           0.0246965   0.855277  82.3217
          297        0.643708  12           0.0202198   0.863873  67.3993
          298        0.560672  12           0.0165546   0.872555  55.1819
          300        0.477636  12           0.0135537   0.881324  45.1791
          301        0.394599  12           0.0110969   0.890182  36.9895
          303        0.311563  12           0.00908534  0.899128  30.2845
          304        0.228527  12           0.00743845  0.908165  24.7948
        Chemical: Thickness=[100, 100, 100, 295, 297, 298, 300, 301, 303, 304]; PH=[6.2, 6.2, 6.4, 6.6, 6.8, 7, 7.2, 7.4, 7.6, 7.8]; PHUnits=Water
        Water: Thickness=[100, 100, 100, 295, 297, 298, 300, 301, 303, 304]; FilledFromTop=false
          InitialValues=[0.375961, 0.374961, 0.352509, 0.329058, 0.321339, 0.313625, 0.305911, 0.298197, 0.290482, 0.282768]
        Nutrient
        WaterBalance SoilWater: SummerDate=1-jun; SummerU=8.55; SummerCona=3.775; WinterDate=1-nov; WinterU=8.55; WinterCona=3.775; DiffusConst=40; DiffusSlope=16; Salb=0.13; CN2Bare=76; CNRed=20; CNCov=0.8; PSIDul=-100; Thickness=[100, 100, 100, 295, 297, 298, 300, 301, 303, 304]
          SWCON=[0.276998, 0.218831, 0.24998, 0.284658, 0.283638, 0.282557, 0.281417, 0.280215, 0.278945, 0.2776]
        Solute NO3: Thickness=[100, 100, 100, 295, 297, 298, 300, 301, 303, 304]; InitialValuesUnits=ppm; WaterTableConcentration=0; D0=0; DepthConstant=0; MaxDepthSoluteAccessible=0; RunoffEffectivenessAtMovingSolute=0; MaxEffectiveRunoff=0
          InitialValues=[0.5, 0.495025, 0.490099, 0.485223, 0.480395, 0.475615, 0.470882, 0.466197, 0.461558, 0.456966]
        Solute NH4: Thickness=[100, 100, 100, 295, 297, 298, 300, 301, 303, 304]; InitialValuesUnits=ppm; WaterTableConcentration=0; D0=0; DepthConstant=0; MaxDepthSoluteAccessible=0; RunoffEffectivenessAtMovingSolute=0; MaxEffectiveRunoff=0
          InitialValues=[0.05, 0.0495025, 0.0490099, 0.0485223, 0.0480395, 0.0475615, 0.0470882, 0.0466197, 0.0461558, 0.0456966]
        Solute Urea: Thickness=[100, 100, 100, 295, 297, 298, 300, 301, 303, 304]; InitialValues=[0, 0, 0, 0, 0, 0, 0, 0, 0, 0]; InitialValuesUnits=kg/ha; WaterTableConcentration=0; D0=0; DepthConstant=0; MaxDepthSoluteAccessible=0; RunoffEffectivenessAtMovingSolute=0; MaxEffectiveRunoff=0
        SoilTemperature Temperature
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