Simulations: Version=210
  Simulation
    Clock: Start=1990-01-01; End=2000-12-31
    Summary
    Weather: FileName=D:/agent/app/d876af00-dc5b-4b72-8648-b6867c90962a.met
    SoilArbitrator
    MicroClimate: a_interception=0; b_interception=1; c_interception=0; d_interception=0; SoilHeatFluxFraction=0.4; MinimumHeightDiffForNewLayer=0; NightInterceptionFraction=0.5; ReferenceHeight=2
    Zone Field: Area=1; Slope=0; AspectAngle=0; Altitude=50
      Report: EventNames=[Maize].Harvesting
        VariableNames:
          [Clock].Today
          [Maize].Phenology.CurrentStageName
          [Maize].AboveGround.Wt
          [Maize].AboveGround.N
          [Maize].Grain.Total.Wt*10 as Yield
          [Maize].Grain.Wt
          [Maize].Grain.Size
          [Maize].Grain.NumberFunction
          [Maize].Grain.Total.Wt
          [Maize].Grain.N
          [Maize].Total.Wt
      Fertiliser
      Soil: ASCOrder=Vertosol; ASCSubOrder=Black; SoilType=Clay; Site=Norwin; NearestTown=Norwin; Region=Darling Downs and Granite Belt; State=Queensland; Country=Australia; NaturalVegetation=Qld. Bluegrass, possible Qld. Blue gum; ApsoilNumber=900; Latitude=-27.581836; Longitude=151.320206; LocationAccuracy=+/- 20m; YearOfSampling=0
        DataSource=CSIRO Sustainable Ecosystems, Toowoomba; Characteriesd as part of the GRDC funded project"Doing it better, doing it smarter, managing soil water in Australian agriculture' 2011
        Comments=Clay - OC, CLL for all crops estimated-based on Bongeen Mywybilla Soil No1
        Physical
          Thickness  BD       AirDry      LL15       DUL         SAT       KS
          50         1.3775   0.086625    0.17325    0.3655      0.460189  1000
          50         1.4425   0.087375    0.17475    0.3625      0.43566   1000
          50         1.5075   0.088125    0.17625    0.3595      0.411132  1000
          316        1.54053  0.0880533   0.176107   0.35784     0.398667  1000
          318        1.565    0.0899375   0.179875   0.351312    0.389434  1000
          319        1.6287   0.0891412   0.178282   0.34255375  0.365396  1000
          321        1.6927   0.08834125  0.1766825  0.333754    0.341245  1000
          322        1.757    0.0875375   0.175075   0.314981    0.316981  1000
          324        1.8216   0.08673     0.17346    0.290604    0.292604  1000
          325        1.8865   0.0859187   0.171837   0.266113    0.268113  1000
          SoilCrop MaizeSoil
            LL=[0.17325, 0.17325, 0.17325, 0.17475, 0.17475, 0.17475, 0.17625, 0.17625, 0.17625, 0.176107, 0.176107, 0.176107, 0.179875, 0.179875, 0.179875, 0.178282, 0.178282, 0.178282, 0.1766825, 0.1766825, 0.1766825, 0.175075, 0.175075, 0.175075, 0.17346, 0.17346, 0.17346, 0.171837, 0.171837, 0.171837]
            KL=[0.08, 0.08, 0.08, 0.0654985, 0.0654985, 0.0654985, 0.0536256, 0.0536256, 0.0536256, 0.0439049, 0.0439049, 0.0439049, 0.0359463, 0.0359463, 0.0359463, 0.0294304, 0.0294304, 0.0294304, 0.0240955, 0.0240955, 0.0240955, 0.0197278, 0.0197278, 0.0197278, 0.0161517, 0.0161517, 0.0161517, 0.0132239, 0.0132239, 0.0132239]
            XF=[1, 1, 1, 1, 1, 1, 1, 1, 1, 1, 1, 1, 1, 1, 1, 1, 1, 1, 1, 1, 1, 1, 1, 1, 1, 1, 1, 1, 1, 1]
        WaterBalance SoilWater: SummerDate=21-jun; SummerU=5; SummerCona=5; WinterDate=21-dec; WinterU=5; WinterCona=5; DiffusConst=40; DiffusSlope=16; Salb=0.12; CN2Bare=73; CNRed=20; CNCov=0.8; PSIDul=-100; Thickness=[50, 50, 50, 316, 318, 319, 321, 322, 324, 325]; SWCON=[0.3, 0.3, 0.3, 0.3, 0.3, 0.3, 0.3, 0.3, 0.3, 0.3]
        Organic: FOMCNRatio=40; CarbonUnits=Total; FBiom=[0.04, 0.02, 0.02, 0.02, 0.01, 0.01, 0.01]
          Thickness  Carbon  SoilCNRatio  FInert    FOM
          50         2.59    12           0.65      1000
          50         2.59    12           0.656533  818.731
          50         1.99    12           0.663131  670.32
          316        1.13    12           0.669795  548.812
          318        0.62    12           0.676527  449.329
          319        0.29    12           0.683326  367.879
          321        0.29    12           0.690194  301.194
          322        0.29    12           0.69713   246.597
          324        0.29    12           0.704137  201.897
          325        0.29    12           0.711213  165.299
        Chemical: Thickness=[50, 50, 50, 316, 318, 319, 321, 322, 324, 325]; PHUnits=Water
          PH=[6.225, 6.175, 6.125, 6.1, 6.11875, 6.35763, 6.59763, 6.83875, 7.081, 7.32438]
        Water: Thickness=[50, 50, 50, 316, 318, 319, 321, 322, 324, 325]; FilledFromTop=false
          InitialValues=[0.3655, 0.3625, 0.3595, 0.35784, 0.351312, 0.34255375, 0.333754, 0.314981, 0.290604, 0.266113]
        Nutrient
        Solute NO3: Thickness=[50, 50, 50, 316, 318, 319, 321, 322, 324, 325]; InitialValuesUnits=ppm; WaterTableConcentration=0; D0=0; DepthConstant=0; MaxDepthSoluteAccessible=0; RunoffEffectivenessAtMovingSolute=0; MaxEffectiveRunoff=0
          InitialValues=[0.5, 0.495025, 0.490099, 0.485223, 0.480395, 0.475615, 0.470882, 0.466197, 0.461558, 0.456966]
        Solute NH4: Thickness=[50, 50, 50, 316, 318, 319, 321, 322, 324, 325]; InitialValuesUnits=ppm; WaterTableConcentration=0; D0=0; DepthConstant=0; MaxDepthSoluteAccessible=0; RunoffEffectivenessAtMovingSolute=0; MaxEffectiveRunoff=0
          InitialValues=[0.05, 0.0495025, 0.0490099, 0.0485223, 0.0480395, 0.0475615, 0.0470882, 0.0466197, 0.0461558, 0.0456966]
        Solute Urea: Thickness=[50, 50, 50, 316, 318, 319, 321, 322, 324, 325]; InitialValues=[0, 0, 0, 0, 0, 0, 0, 0, 0, 0]; InitialValuesUnits=kg/ha; WaterTableConcentration=0; D0=0; DepthConstant=0; MaxDepthSoluteAccessible=0; RunoffEffectivenessAtMovingSolute=0; MaxEffectiveRunoff=0
        SoilTemperature Temperature
      SurfaceOrganicMatter: InitialResidueName=wheat_stubble; InitialResidueType=wheat; InitialResidueMass=500; InitialStandingFraction=0; InitialCPR=0; InitialCNR=100
      Plant Maize
      Manager Sow using a variable rule
        Crop = Maize
        StartDate = 1-nov
        EndDate = 10-jan
        MinESW = 100.0
        MinRain = 25.0
        RainDays = 7
        CultivarName = Dekalb_XL82
        SowingDepth = 30.0
        RowSpacing = 750.0
        Population = 6.0
```csharp
using APSIM.Numerics;
using Models.Climate;
using System.Linq;
using System;
using Models.Core;
using Models.PMF;
using Models.Soils;
using Models.Utilities;
using APSIM.Shared.Utilities;
using Models.Interfaces;

namespace Models
{
    [Serializable]
    public class Script : Model
    {
        [Link] private Clock Clock;
        [Link] private Fertiliser Fertiliser;
        [Link] private Summary Summary;
        [Link] private Soil Soil;
        private Accumulator accumulatedRain;
        [Link]
        private ISoilWater waterBalance;
        
        [Description("Crop")]
        public IPlant Crop { get; set; }

        [Description("Start of sowing window (d-mmm)")]
        public string StartDate { get; set; }

        [Description("End of sowing window (d-mmm)")]
        public string EndDate { get; set; }

        [Description("Minimum extractable soil water for sowing (mm)")]
        public double MinESW { get; set; }

        [Description("Accumulated rainfall required for sowing (mm)")]
        public double MinRain { get; set; }

        [Description("Duration of rainfall accumulation (d)")]
        public int RainDays { get; set; }

        [Display(Type = DisplayType.CultivarName)]
        [Description("Cultivar to be sown")]
        public string CultivarName { get; set; }

        [Description("Sowing depth (mm)")]
        public double SowingDepth { get; set; }

        [Description("Row spacing (mm)")]
        public double RowSpacing { get; set; }

        [Description("Plant population (/m2)")]
        public double Population { get; set; }
        
        
        [EventSubscribe("StartOfSimulation")]
        private void OnSimulationCommencing(object sender, EventArgs e)
        {
            accumulatedRain = new Accumulator(this, "[Weather].Rain", RainDays);
        }

        [EventSubscribe("DoManagement")]
        private void OnDoManagement(object sender, EventArgs e)
        {
            accumulatedRain.Update();
            
            if (DateUtilities.WithinDates(StartDate, Clock.Today, EndDate) &&
                !Crop.IsAlive &&
                MathUtilities.Sum(waterBalance.ESW) > MinESW &&
                accumulatedRain.Sum > MinRain)
            {
                Crop.Sow(population: Population, cultivar: CultivarName, depth: SowingDepth, rowSpacing: RowSpacing);    
            }
        }
    }
}
```
      Manager Fertilise at sowing
        Crop = Maize
        FertiliserType = NO3N
        Amount = 160.0
```csharp
using Models.Soils;
using System;
using System.Linq;
using Models.Core;
using Models.PMF;
namespace Models
{
    [Serializable]
    public class Script : Model
    {
        [Link] Clock Clock;
        [Link] Fertiliser Fertiliser;
        
        [Description("Crop to be fertilised")]
        public IPlant Crop { get; set; }

        [Description("Type of fertiliser to apply? ")] 
        [Display(Type = DisplayType.FertiliserType)]public string FertiliserType { get; set; }
    
        [Description("Amount of fertiliser to be applied (kg/ha)")]
        public double Amount { get; set; }
        
        [EventSubscribe("Sowing")]
        private void OnSowing(object sender, EventArgs e)
        {
            Model crop = sender as Model;
            if (Crop != null && crop.Name.ToLower() == (Crop as IModel).Name.ToLower())
                Fertiliser.Apply(amount: Amount, type: FertiliserType);
        }
    }
}
```
      Manager Harvest
        Crop = Maize
```csharp
using APSIM.Shared.Utilities;
using Models.Utilities;
using Models.Soils;
using Models.PMF;
using Models.Core;
using System;
using System.Linq;

namespace Models
{
    [Serializable] 
    public class Script : Model
    {
        [Description("Crop")]
        public IPlant Crop { get; set; }
        
        [EventSubscribe("DoManagement")]
        private void OnDoManagement(object sender, EventArgs e)
        {
            if (Crop.IsReadyForHarvesting)
            {
                Crop.Harvest();
                Crop.EndCrop();
            }
        }
    }
}
```
  DataStore
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